// COMSOL Multiphysics 5.5.0.359 model "AiNU_TRPL_HZ.mph"
// Outline of the model tree

Parameters
  a0 = 1e5[cm^-1]  // Optical absorption coefficient at excitation wavelength
  d = 500[nm]  // perovskite thickness
  Epulse = 22[nJ/cm^2]  // pulse energy
  lam_ex = 477[nm]  // excitation wavelength
  phi_0 = lam_ex*Epulse/(h_const*c_const)/t_pulse  // pulse intensity (photons/s/m^2)
  t_end = 30000
  t_pulse = 0.1[ns]  // pulse time
  Eg_ABS = 1.6186[V]  // Perovskite bandgap
  chi_ABS = 3.9[V]
  Nc_ABS = 5e18[cm^-3]  // Perovskite Nc
  Nv_ABS = 5e18[cm^-3]  // Perovskite Nv
  eps_ABS = 64  // Perovskite permittivity
  area_pvk = 0.16[cm^2]
  NA_ABS = 1e14[cm^-3]
  mun_ABS = 1[cm^2/V/s]  // Perovskite n mobility
  B_rad = 1e-11[cm^3/s]  // Radiative recombination coefficient
  Nt = 5e11[cm^-3]  // Trap density Nt_NA*NA_ABS
  S_front = 1[cm/s]  // Front side SRV
  S_back = S_front  // Rear side SRV
  sigma_n = 1e-13[cm^2]  // Electron trapping cross-section
  sigma_p = sigma_n  // Hole trapping cross-section
  C_Aug = 5e-29[cm^6/s]  // Auger recombination
  mup_ABS = 0.01[cm^2/V/s]  // Perovskite p mobility
  T_ABS = 293.15[K]  // Temperature
  t_eq = 5000
  ft_initial = 0
  Et_r = 0.1
  C_Aug_n = C_Aug
  C_Aug_p = C_Aug

Functions
  step1: Step | location = 1; from = 1; to = 0; smooth = 0.01

Variables
  var1 "Variables 1"
    TRPL_front = intop1(semi.Rdi*Tout(x))  // TRPL emitted from front of sample
    TRPL_internal = intop1(semi.Rdi)  // TRPL internal
    PL_Max = timemax(1e-12,1e-7,TRPL_internal)

Couplings
  intop1: Integration on domains 1

Geometry
  geom1 "Geometry 1" (1D, length unit m)
    i1: Interval | coord = {0, d}
    fin: Finalize "Form Union"

Materials
  mat1: Common "Material 1" on all domains
    def "Basic"
      relpermittivity = eps_ABS
    SemicondMaterial "Semiconductor material"
      Eg0 = Eg_ABS
      chi0 = chi_ABS
      Nv = Nv_ABS
      Nc = Nc_ABS
      mun = mun_ABS
      mup = mup_ABS
    Direct "Direct recombination"
      C = B_rad
    Auger "Auger recombination"
      Cn = C_Aug_n
      Cp = C_Aug_p

Physics
  semi: Semiconductor on all domains
    dependent variable V
    d.A = area_pvk
    smm1: SemiconductorMaterialModel (default) | minput_temperature = T_ABS
    ins1: Insulation (default)
    zc1: ZeroCharge (default)
    ii1: InsulatorInterface (default)
    cont1: Continuity "Continuity/Heterojunction 1" (default)
    init1: init "Initial Values 1" (default)
    udg1: UDGeneration "User-Defined Generation 1" on domains 1
      Gn = phi_0*a0*exp(-a0*x)*step1(t/t_pulse)
      Gp = phi_0*a0*exp(-a0*x)*step1(t/t_pulse)
    dir1: DIRecombination "Direct Recombination 1" on domains 1
    adm1: AnalyticDopingModel on domains 1 | NAc = NA_ABS
    tar1: TrapAssistedRecombination on domains 1 | IncludeTraps = ExplicitTraps; SpecifyTrapSpecies = 1
      dtd1: DiscreteEnergyLevelDomain "Discrete Energy Level 1" on all domains
        TrapType = Acceptor
        DistributionCenterPoint = Relative
        Et0in = Etrap
        Et0inrel = Et_r
        ft_init = ft_initial
        Nt_dd = Nt
        Nt_da = Nt
        Nt_dne = Nt
        Nt_dnh = Nt
        sigman = sigma_n
        vn_th = 1.399e7[cm/s]
        sigmap = sigma_p
        vp_th = 1.246e7[cm/s]
    tasr1: TrapAssistedSurfaceRecombination on boundaries 1 | vsn = S_front; vsp = S_front
    tasr2: TrapAssistedSurfaceRecombination on boundaries 2 | vsn = S_back; vsp = S_back
    gc1: GateContact "Thin Insulator Gate 1" on boundaries 1, 2
    aur1: AURecombination "Auger Recombination 1" on domains 1

Mesh
  mesh1 "Mesh 1"
    size: MeshSizeDefault | hmax = 3.35E-8; hmin = 1.5E-10; hcurve = 0.3; hgrad = 1.3
    edg1: Edge on domains 1
      dis1: Distribution on domains 1
        type = predefined
        reverse = on
        elemcount = 100
        elemratio = 0.01
        method = geometric
        symmetric = on

Studies
  std1 "Study 1"
    time: Transient "Time Dependent"
      tunit = ns
      tlist = 10^{range(log10(1.0e-6),1/10,log10(t_end))}
      usertol = on
      rtol = 0.001

Solver configurations
  sol1 "Solution 1" (study std1)
    v1: Variables "Dependent Variables 1"
    t1: Time "Time-Dependent Solver 1"
      tlist = 10^{range(log10(1.0e-6),1/10,log10(t_end))}
      rtol = 0.001
      tstepsbdf = strict
      fc1: FullyCoupled | linsolver = d1; dtech = auto; maxiter = 4
      d1: Direct | linsolver = spooles
  sol2 "Solution 2" (study std1)
    v1: Variables "Dependent Variables 1"
    t1: Time "Time-Dependent Solver 1"
      tlist = 10^{range(log10(1.0e-6),1/10,log10(t_end))}
      rtol = 0.001
      tstepsbdf = strict
      fc1: FullyCoupled | linsolver = d1; dtech = auto; maxiter = 4
      d1: Direct

Datasets
  dset1: Solution | solution = sol1
  dset2: Solution | solution = sol2

Plots
  pg1: PlotGroup1D "TRPL" | data = dset2
    glob1: Global | expr = intop1(semi.Rdi); descr = Integrated PL emission

Exports
  plot1: Plot | filename = /home/hualin/Desktop/nci/files/data/baseline/raw/convert/trpl_t11_22.txt